etano
Tc1 := 305.43
Pc1 := 48.1595*101325
omega1 := 0.09781
q1 := 0.02669
rk1 := -2  # solo para pruebas
a(omega, Tc, Pc, Tr, q) := omegaa*(r*Tc)^2/Pc*alpha(omega, Tr)  # error: This variable is undefined.
mmm(omega, r1, r2, r3, r4) := r1 + r2*omega + r3*omega^2 + r4*omega^3
alpha(omega, Tr, q, r1, r2, r3, r4, x) := (1 + mmm(omega, r1, r2, r3, r4)*(1 - sqrt(Tr)) + x*q*(1 - Tr)*(0.7 - Tr))^2
alphaderiv(omega, Tr, q, r1, r2, r3, r4, x) := 1/sqrt(alpha(omega, Tr, q, r1, r2, r3, r4, x))*(-mmm(omega, r1, r2, r3, r4)*sqrt(Tr) - x*q*(3.4*Tr - 4*Tr^2))
oneover(omega, Tr, q, r1, r2, r3, r4, x) := 1/sqrt(alpha(omega, Tr, q, r1, r2, r3, r4, x))
Test
alpha(omega1, 0.5, q1, 0.378893, 1.4897153, -0.17131848, 0.0196554, 1) = 1.33598
alphaderiv(omega1, 0.5, q1, 0.378893, 1.4897153, -0.17131848, 0.0196554, 1) = -0.336106
Soave
alpha(omega1, 0.3, q1, 0.48508, 1.55171, -0.15613, 0, 1) = 1.67659
alphaderiv(omega1, 0.3, q1, 0.48508, 1.55171, -0.15613, 0, 1) = -0.282366
# Peng and Robinson
alpha(omega1, 0.5, q1, 0.37464, 1.54226, -0.2699, 0, 1) = 1.33593
Tr := 1.3
alphaderiv(omega1, 0.5, q1, 0.37464, 1.54226, -0.2699, 0, 1) = -0.336066
cc := 1 + 0.3*rk1 + mmm(omega1, 0.48508, 1.55191, -0.1563, 0)/2 = 0.717689
mmm(omega1, 0.48508, 1.55191, -0.1563, 0) = 0.635377
# Mathias | Mathias above Tc
alphaMA := e^((2*(cc - 1)/cc)*(1 - Tr^cc)) = 1.17704
alpha(omega1, 0.3, rk1, 0.48508, 1.55191, -0.1563, 0, -1) = 3.41276
Tr = 1.3
-2*(cc - 1) = 0.564623
alphaderiv(omega1, 0.3, rk1, 0.48508, 1.55191, -0.1563, 0, -1) = -0.902912
alphaDeriv := -2*(cc - 1)*Tr^cc = 0.681608
# Stryjek and vera
svalpha := 1 + mmm(omega1, 0.378893, 1.4897153, -0.17131848, 0.0196554)*(1 - sqrt(Tr)) + q1*(1 - Tr)*(0.7 - Tr) = 0.931495
svalpha^2 = 0.867683
mmm(omega1, 0.378893, 1.4897153, -0.17131848, 0.0196554) = 0.522981
alpha(omega1, 0.5, q1, 0.378893, 1.4897153, -0.17131848, 0.0196554, 1) = 1.33598
alphaderiv(omega1, 0.5, q1, 0.378893, 1.4897153, -0.17131848, 0.0196554, 1) = -0.336106
alpha(omega1, 1.3, q1, 0.378893, 1.4897153, -0.17131848, 0.0196554, 0) = 0.858756
alphaderiv(omega1, 1.3, q1, 0.378893, 1.4897153, -0.17131848, 0.0196554, 0) = -0.643462
alpha(omega1, Tr, q1) = ƒ(Unitless, Unitless, Unitless, Unitless, Unitless) → Unitless
mmm(omega1) = ƒ(any1, any1, any1, any1) → any1
second(Tr, q) := x*q*(3.4*Tr - 4*Tr^2)  # error: This variable is undefined.
second(Tr, q1) =  # error: This variable is undefined.
oneover(omega1, Tr, q1) = ƒ(Unitless, Unitless, Unitless, Unitless, Unitless) → Unitless
alphaderiv(omega1, Tr, q1) = ƒ(Unitless, Unitless, Unitless, Unitless, Unitless) → Unitless
