etano
rksm
u := 1
w := 0
r := 8314.472
Tc := 305.43
omegaa := 0.42748023
Pc := 4879761.34
omegab := 0.08664035
omega := 0.09781
r1 := 0.48508
q := 0
r2 := 1.55171
r3 := -0.15613
r4 := 0
b := omegab*r*Tc/Pc = 0.0450887
Temp := 241.255013
Tr := Temp/Tc
P := 1013250
mia := r1 + r2*omega + r3*omega^2 + r4*omega^3 = 0.635359
alpha := (1 + mia*(1 - sqrt(Tr)) + q*(1 - Tr)*(0.7 - Tr))^2 = 1.14636
a := omegaa*(r*Tc)^2/Pc*alpha = 647634
Aa := a*P/(r*Temp)^2 = 0.163089
Bb := b*P/(r*Temp) = 0.0227758
calpha := 1 - (u - 1)*Bb = 1
cbeta := Aa - u*Bb - u*Bb^2 + w*Bb^2 = 0.139794
cgamma := Aa*Bb + w*Bb^2 + w*Bb^3 = 0.00371448
cC := 3*cbeta - calpha^2 = -0.580617
cD := -calpha^3 + 4.5*calpha*cbeta - 13.5*cgamma = -0.421071
cQ := cC^3 + cD^2 = -0.0184346
tetha := acos(-cD/sqrt(-cC^3)) = 0.311923
zv := 1/3*(calpha + 2*sqrt(-cC)*cos(tetha/3)) = 0.838578
z := 1/3*(calpha + 2*sqrt(-cC)*cos(tetha/3 + 120*π/180)) = 0.0350518
v := z*r*Temp/P = 0.0693912
vv := zv*r*Temp/P = 1.66011
delta := sqrt(u^2 - 4*w) = 1
Llv := (1/delta)*ln((2*vv + (u + delta)*b)/(2*vv + (u - delta)*b)) = 0.0267977
Ll := (1/delta)*ln((2*v + (u + delta)*b)/(2*v + (u - delta)*b)) = 0.500639
parciala := 2*a = 1295268
logfugv := -ln((vv - b)/vv) + (zv - 1)*(b/b) + a/(r*Temp*b)*(b/b - parciala/a)*Llv - ln(zv) = -0.149727
logfug := -ln((v - b)/v) + (z - 1)*(b/b) + a/(r*Temp*b)*(b/b - parciala/a)*Ll - ln(z) = -0.149727
fugv := e^logfugv = 0.860943
fug := e^logfug = 0.860943
