a := 5.40056
b := 0.177817
cc := -6.92626*10^-5
d := 8.69858*10^-9
ee := 0
IH(T) := a*T + b*cc*coth(cc/T) - d*ee*tanh(ee/T)
IH(298) = 1662.36
IH(298.15) = 1663.19
href := -83767.2
h := href + IH(298) - IH(298.15) = -83768
