LL := 1/(2*sqrt(2))*ln((2 + sqrt(2))/(2 - sqrt(2))) = 0.623225
LLL := 1/1*ln((2 + sqrt(2))/(2 - sqrt(2))) = 1.76275
u := 1
w := 0
LLLL(u, w) := (1/sqrt(u^2 - 4*w))*ln((2 + (u + sqrt(u^2 - 4*w)))/(2 + (u - sqrt(u^2 - 4*w))))
pr
LLLL(2, -1) = 0.623225
1931144.22641/101325 = 19.0589
srk
LLLL(1, 0) = 0.693147
