etano
rksm
u := 1
w := 0
r := 8314.472
Tc := 305.43
omegaa := 0.42748023
Pc := 48.1595
omegab := 0.08664035
omega := 0.09781
r1 := 0.48508
q := 0
r2 := 1.55171
r3 := -0.15613
r4 := 0
b := omegab*r*Tc/Pc = 4568.62
Temp := 241.255013
Tr := Temp/Tc
P := 1013250
mia := r1 + r2*omega + r3*omega^2 + r4*omega^3 = 0.635359
alpha := (1 + mia*(1 - sqrt(Tr)) + q*(1 - Tr)*(0.7 - Tr))^2 = 1.14636
a := omegaa*(r*Tc)^2/Pc*alpha = 6.56215e10
Aa := a*P/(r*Temp)^2 = 16525
Bb := b*P/(r*Temp) = 2307.76
calpha := 1 - (u - 1)*Bb = 1
cbeta := Aa - u*Bb - u*Bb^2 + w*Bb^2 = -5311528
cgamma := Aa*Bb + w*Bb^2 + w*Bb^3 = 38135643
cC := 3*cbeta - calpha^2 = -15934585
cD := -calpha^3 + 4.5*calpha*cbeta - 13.5*cgamma = -538733059
cQ := cC^3 + cD^2 = -4.04568e21
tetha := acos(-cD/sqrt(-cC^3)) = 1.56233
zv := 1/3*(calpha + 2*sqrt(-cC)*cos(tetha/3)) = 2308.76
z := 1/3*(calpha + 2*sqrt(-cC)*cos(tetha/3 + 120*π/180)) = -2300.58
v := z*r*Temp/P = -4554.4
vv := zv*r*Temp/P = 4570.59
delta := sqrt(u^2 - 4*w) = 1
Llv := (1/delta)*ln((2*vv + (u + delta)*b)/(2*vv + (u - delta)*b)) = 0.692931
Ll := (1/delta)*ln((2*v + (u + delta)*b)/(2*v + (u - delta)*b)) = -5.76942 + 3.14159i
parciala := 2*a = 1.31243e11
logfugv := -ln((vv - b)/vv) + (zv - 1)*(b/b) + a/(r*Temp*b)*(b/b - parciala/a)*Llv - ln(zv) = 2302.8
logfug := -ln((v - b)/v) + (z - 1)*(b/b) + a/(r*Temp*b)*(b/b - parciala/a)*Ll - ln(z) = -2268.7 - 25.6373i
fugv := e^logfugv  # error: Found a number with a magnitude greater than 10^307 while trying to evaluate this expression.
fug := e^logfug = 0
