a := 5.40056
a := 5.40056*1000
b := 0.177817
b := 0.177817*1000
cc := -6.92626*10^-5
cc := -6.92626*10^-5*1000
d := 8.69858*10^-9
d := 8.69858*10^-9*1000
ee := 0
ee := 0
IH(T) := a*T + b*cc*coth(cc/T) - d*ee*tanh(ee/T)
IHB(T) := a*T + b*(T^2) + cc*T^3 + d*T^4 + ee*T^5
IH(298) = 1662356
IH(298) = 1662356
IH(298.15) = 1663193
href := -83767.2
hba := href + IHB(350) - IHB(298.15) = 5099942
h := href + IH(350) - IH(298.15) = 205472
hb := hba*1000 = 5.09994e9
ss := -30983.306688
second := 2863645.55799
enthalpy := hb + ss + second - 8314.472*350 = 5.09986e9
enthalpy/1000 = 5099864
8314.472*350 = 2910065
second - 8314.472*350 = -46419.6
