Tc := 305.43
48.1595*101325 = 4879761  # resultado eqfases
Pc := 48.1595
omega := 0.09781
41.573321*101325 =  # no stored result
Temperature := 298  # de dippr en atm
48.08289*101325 = 4871999
p := Pc*10^(-7/3*(1 + omega)*(Tc/Temperature - 1)) = 41.5733
