b1 := 0.0404860555129
RR := 8314.472
b := 0.0515497788439
LL := -0.62322524014
z := 0.00354993065539
B := 0.00210810617152
Temp := 298
gamma1 := 0.973392210545
a1 := 0.973392210545
fug := e^(b1/b*(z - 1) - ln(z - B) - 1/(2*sqrt(2))*(a1/(b1*RR*Temp) + ln(gamma1)/LL)*ln((z + (1 + sqrt(2))*B)/(z + (1 - sqrt(2))*B))) = 311.477
