rksm
u := 1
w := 0
r := 8314.472
etano
propano
omegaa := 0.45723553
Tc1 := 305.43
Tc2 := 369.82
omegab := 0.077796074
Pc1 := 48.1595*101325
Pc2 := 41.9396*101325
r1 := 0.378893
omega1 := 0.09781
omega2 := 0.15416
r2 := 1.4897153
q1 := 0.02669
q2 := 0.03136
r3 := -0.17131848
r4 := 0.0196554
Temp := 298
Tr2 := Temp/Tc2 = 0.805797
Tr1 := Temp/Tc1 = 0.975674
a(omega, Tc, Pc, Tr, q) := omegaa*(r*Tc)^2/Pc*(1 + (r1 + r2*omega + r3*omega^2 + r4*omega^3)*(1 - sqrt(Tr)) + q*(1 - Tr)*(0.7 - Tr))^2
a1 := a(omega1, Tc1, Pc1, Tr1, q1)
a2 := a(omega2, Tc2, Pc2, Tr2, q2)
x1 := 0.3
k := 0.05
a1 = 611816
x2 := 0.7
b := omegab*r*Tc/Pc  # error: This variable is undefined.
a2 = 1145680
aaa := a1*x1^2 + a2*x2^2 + 2*x1*x2*sqrt(a1*a2)*(1 - k) = 950499
