RR := 8314.472
omegab := 0.077796074
Tc1 := 305.43
Tc2 := 369.82
pc1 := 4.87976134*10^6
pc2 := 41.9396*101325 = 4249530
b(Tc, pc) := omegab*RR*Tc/pc
b1 := b(Tc1, pc1) = 0.0404861
b2 := b(Tc2, pc2) = 0.0562914
gamma_ij(bi, bj) := bj/bi
gama12 := gamma_ij(b1, b2) = 1.39039
gama21 := gamma_ij(b2, b1) = 0.719223
Temp := 298
x1 := 0.3
x2 := 0.7
excessGibbs := RR*Temp*(-x1*ln(x1 + gama12*x2) - x2*ln(gama21*x1 + x2)) = -26961.8
lngama1 := -ln(x1 + gama12*x2) + x2*(gama12/(x1 + gama12*x2) - gama21/(gama21*x1 + x2)) = -0.0269682
gama1 := e^lngama1 = 0.973392
LLLL(u, w) := (1/sqrt(u^2 - 4*w))*ln((2 + (u + sqrt(u^2 - 4*w)))/(2 + (u - sqrt(u^2 - 4*w))))
omegaa := 0.45723553
LL := LLLL(2, -1) = 0.623225
a2 := 1145679.58263
a1 := 611816.423764
x1*a1/b1 = 4533534
bb := x1*b1 + x2*b2 = 0.0515498
a := bb*(-excessGibbs/LL + x2*a2/b2 + x1*a1/b1) = 970356
alpha1 := 1.01248129346
oneOverN := bb*RR*Temp*□  # error: This '(' requires a matching ')'.
